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Z_1(s) := R_1 + L_1*s
Z_2(s) := R_2 + L_2*s
Z_3(s) := R_3
Z(s) := Z_1(s) + Z_2(s) + Z_3(s) → (L_2 + L_1)*s + R_3 + R_2 + R_1
V_R3(s) := V_i*Z_3(s)/Z(s) simplify → R_3*V_i/((L_2 + L_1)*s + R_3 + R_2 + R_1)
clear(Z_1, Z_2, Z_3, Z)
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Z_1 := L_1*s + R_1
Z_2 := L_2*s + R_2 + R_4
Z_3 := L_3*s + R_3 + R_5
Z_par := Z_2*Z_3/(Z_2 + Z_3)
I_1 == I_2 + I_3
I_1 == (V_i - V_1)/Z_1
I_2 == V_1/Z_2
I_3 == V_1/Z_3
# KVL: (not needed)
V_i == I_1*Z_1 + I_2*Z_2
V_i == I_1*Z_1 + I_3*Z_3
[I_1, I_2, I_3, V_1] := [I_1 == I_2 + I_3; I_1 == (V_i - V_1)/Z_1; I_2 == V_1/Z_2; I_3 == V_1/Z_3] solve, I_1, I_2, I_3, V_1 → [((L_3 + L_2)*V_i*s + (R_5 + R_4 + R_3 + R_2)*V_i)/(((L_2 + L_1)*L_3 + L_1*L_2)*s^2 + ((L_2 + L_1)*R_5 + (L_3 + L_1)*R_4 + (L_2 + L_1)*R_3 + (L_3 + L_1)*R_2 + (L_3 + L_2)*R_1)*s + (R_4 + R_2 + R_1)*R_5 + (R_3 + R_1)*R_4 + (R_2 + R_1)*R_3 + R_1*R_2), (L_3*V_i*s + (R_5 + R_3)*V_i)/(((L_2 + L_1)*L_3 + L_1*L_2)*s^2 + ((L_2 + L_1)*R_5 + (L_3 + L_1)*R_4 + (L_2 + L_1)*R_3 + (L_3 + L_1)*R_2 + (L_3 + L_2)*R_1)*s + (R_4 + R_2 + R_1)*R_5 + (R_3 + R_1)*R_4 + (R_2 + R_1)*R_3 + R_1*R_2), (L_2*V_i*s + (R_4 + R_2)*V_i)/(((L_2 + L_1)*L_3 + L_1*L_2)*s^2 + ((L_2 + L_1)*R_5 + (L_3 + L_1)*R_4 + (L_2 + L_1)*R_3 + (L_3 + L_1)*R_2 + (L_3 + L_2)*R_1)*s + (R_4 + R_2 + R_1)*R_5 + (R_3 + R_1)*R_4 + (R_2 + R_1)*R_3 + R_1*R_2), (L_2*L_3*V_i*s^2 + (L_2*R_5 + L_3*R_4 + L_2*R_3 + L_3*R_2)*V_i*s + ((R_4 + R_2)*R_5 + R_3*R_4 + R_2*R_3)*V_i)/(((L_2 + L_1)*L_3 + L_1*L_2)*s^2 + ((L_2 + L_1)*R_5 + (L_3 + L_1)*R_4 + (L_2 + L_1)*R_3 + (L_3 + L_1)*R_2 + (L_3 + L_2)*R_1)*s + (R_4 + R_2 + R_1)*R_5 + (R_3 + R_1)*R_4 + (R_2 + R_1)*R_3 + R_1*R_2)]
V_L3(s) := V_1 - I_3*(R_3 + R_5)/(L_3*s + R_3 + R_5) simplify → V_i*(L_2*s + R_4 + R_2)*(L_3^2*s^2 + (2*L_3*R_5 + 2*L_3*R_3)*s + R_5^2 + (2*R_3 - 1)*R_5 + (R_3^2 - R_3))/((L_3*s + R_5 + R_3)*(((L_2 + L_1)*L_3 + L_1*L_2)*s^2 + ((L_2 + L_1)*R_5 + (L_3 + L_1)*R_4 + (L_2 + L_1)*R_3 + (L_3 + L_1)*R_2 + (L_3 + L_2)*R_1)*s + (R_4 + R_2 + R_1)*R_5 + (R_3 + R_1)*R_4 + (R_2 + R_1)*R_3 + R_1*R_2))
V_L3(s)/V_i simplify → (L_2*s + R_4 + R_2)*(L_3^2*s^2 + (2*L_3*R_5 + 2*L_3*R_3)*s + R_5^2 + (2*R_3 - 1)*R_5 + (R_3^2 - R_3))/((L_3*s + R_5 + R_3)*(((L_2 + L_1)*L_3 + L_1*L_2)*s^2 + ((L_2 + L_1)*R_5 + (L_3 + L_1)*R_4 + (L_2 + L_1)*R_3 + (L_3 + L_1)*R_2 + (L_3 + L_2)*R_1)*s + (R_4 + R_2 + R_1)*R_5 + (R_3 + R_1)*R_4 + (R_2 + R_1)*R_3 + R_1*R_2))
I_3/V_i simplify → (L_2*s + R_4 + R_2)/(((L_2 + L_1)*L_3 + L_1*L_2)*s^2 + ((L_2 + L_1)*R_5 + (L_3 + L_1)*R_4 + (L_2 + L_1)*R_3 + (L_3 + L_1)*R_2 + (L_3 + L_2)*R_1)*s + (R_4 + R_2 + R_1)*R_5 + (R_3 + R_1)*R_4 + (R_2 + R_1)*R_3 + R_1*R_2)
L_1 := 1*10^-3
L_2 := 2*10^-3
L_3 := 3*10^-3
R_1 := 4
R_2 := 5
R_3 := 6
R_4 := 7
R_5 := 8
I_L3 := V_i*(L_2*s + R_4 + R_2)/(((L_2 + L_1)*L_3 + L_1*L_2)*s^2 + ((L_2 + L_1)*R_5 + (L_3 + L_1)*R_4 + (L_2 + L_1)*R_3 + (L_3 + L_1)*R_2 + (L_3 + L_2)*R_1)*s + (R_4 + R_2 + R_1)*R_5 + (R_3 + R_1)*R_4 + (R_2 + R_1)*R_3 + R_1*R_2)
V_L3 := V_i*(L_2*s + R_4 + R_2)*(L_3^2*s^2 + (2*L_3*R_5 + 2*L_3*R_3)*s + R_5^2 + (2*R_3 - 1)*R_5 + (R_3^2 - R_3))/((L_3*s + R_5 + R_3)*(((L_2 + L_1)*L_3 + L_1*L_2)*s^2 + ((L_2 + L_1)*R_5 + (L_3 + L_1)*R_4 + (L_2 + L_1)*R_3 + (L_3 + L_1)*R_2 + (L_3 + L_2)*R_1)*s + (R_4 + R_2 + R_1)*R_5 + (R_3 + R_1)*R_4 + (R_2 + R_1)*R_3 + R_1*R_2))
# <- Step response
v_L3_step(t) := V_L3/V_i*(1/s) invlaplace → (-(541*sqrt(3)*1i*sqrt(11)*e^(-(5000*t))*sin(1000*sqrt(3)*1i*sqrt(11)*t/11)) + (3303*cos(1000*sqrt(3)*1i*sqrt(11)*t/11)*e^(-(5000*t)) + 1287 - 3366*e^(-(14000*t)/3)))/2244
i_L3_step(t) := I_L3/V_i*(1/s) invlaplace → (29*sqrt(3)*1i*sqrt(11)*e^(-(5000*t))*sin(1000*sqrt(3)*1i*sqrt(11)*t/11) + (99 - 99*cos(1000*sqrt(3)*1i*sqrt(11)*t/11)*e^(-(5000*t))))/2244
v_L3_step(0.1) → 0.573529411765
I_L3/V_i simplify → (2000*s + 12000000)/(11*s^2 + 110000*s + 272000000)
i_L3_step(0.1) → 0.0441176470588
V_L3/V_i simplify → (132000*s^2 + 956000000*s + 1176000000000)/(11*(3*s + 14000)*(11*s^2 + 110000*s + 272000000)) + 6/11
# [plot: i_L3_step(t) vs t]
