# Newtons method:
V := 1
L1 := 2*s
L2 := 3*s
L3 := 5*s
R1 := 7
R2 := 11
R3 := 13  # <- Actual values that we are trying to determine)
Z1 := L1 + R1
Z2 := L2 + R2
Z3 := L3 + R3
Z4 := (Z2^-1 + Z3^-1)^-1 simplify → (15*s + 49)/8 - 1/(2*s + 6)  # <- R2 || R3
# Basically Newtons method
# Using three measurements:
# First measurement:
# With S1 open and S2 closed:
I := V/(Z1 + Z2) → 1/(5*s + 18)  # <- What our probe measures
TOT1 := V/I → 5*s + 18  # <- Total resistance of measurement 1
# Second measurement:
# With S1 closed and S2 open:
I := V/(Z1 + Z3) → 1/(7*s + 20)
TOT2 := V/I → 7*s + 20
# Third measurement:
# With S1 open and S2 open:
I := V/(Z1 + Z4) simplify → (8*s + 24)/(31*s^2 + 198*s + 311)
TOT3 := V/I simplify → (31*s + 105)/8 - 1/(2*s + 6)
# Guess a value for R1:
Z1_guess := 0  # <- The current guess (Change for each iteration)
Z2_guess := TOT1 - Z1_guess → 5*s + 18  # <- Since EQ1 = R1+R2 in our setup
Z3_guess := TOT2 - Z1_guess → 7*s + 20  # <- Since EQ2 = R1+R3 in our setup
# Find error:
Z4_guess := (Z2_guess^-1 + Z3_guess^-1)^-1 simplify → (210*s + 691)/72 - 169/(432*s + 1368)
TOT3_guess := Z1_guess + Z4_guess simplify → (210*s + 691)/72 - 169/(432*s + 1368)
Err := TOT3 - TOT3_guess simplify → -(47*s + 177)/(72*(s + 3)*(6*s + 19)) + (69*s + 254)/72
Z1_new_guess := Z1_guess + Err → -(47*s + 177)/((6*s + 19)*(72*s + 216)) + (69*s + 254)/72
