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# Method involving BV0202:
# Look at the setup above. Assume that the values L1, and L2 are unknown.
# We have previously estimated the values of R1, R2 and R3.
# We have the voltage probe PR1 available and we have control over the switch S1. How can we determine the parameters of the inductors?
# We can't express in terms of flow now, since it is shut off in second test.
# Instead we can look at the pressure at the appliance and compare with the pressure at the outlet.
# (We known V_i, and we read V_Z2)
# Symbolic derivation:
Z_1 := R_1 + L_1*s
Z_2 := R_2 + L_2*s
Z_3 := R_3
V_Z2_1 := V_i*Z_3/(Z_1 + Z_2 + Z_3) simplify → R_3*V_i/((L_2 + L_1)*s + R_3 + R_2 + R_1)  # <- When main pipe is connected
V_Z2_2 := V_i*Z_3/(Z_2 + Z_3) simplify → R_3*V_i/(L_2*s + R_3 + R_2)  # <- When main pipe is not connected
# We see that we expect the transfer functions to be two 1st order systems.
# If we get them to standard form we know what to expect from our readings of the sensors:
# We want:
V_i*K*α/(s + α)
# For V_Z2_2:
V_i*R_3/(L_2*s + R_2 + R_3)
# ->
V_i*R_3*1/(L_2*s + R_2 + R_3)
# ->
V_i*R_3*1/(R_2 + R_3)*(R_2 + R_3)/(L_2*s + R_2 + R_3)
V_i*R_3/(R_2 + R_3)*(R_2 + R_3)/(L_2*s + R_2 + R_3)  # ->
V_i*R_3/(R_2 + R_3)*(R_3 + R_2)/L_2/(s + (R_2 + R_3)/L_2)
K_Z2_2 == R_3/(R_2 + R_3)
α_Z2_2 == (R_3 + R_2)/L_2
τ_Z2_2 == 1/α_Z2_2
# For V_Z2_1:
V_Z2_1 == V_i*R_3/((L_1 + L_2)*s + R_1 + R_2 + R_3)
# (Same procedure)
# ->
V_i*R_3/(R_1 + R_2 + R_3)*(R_1 + R_2 + R_3)/((L_2 + L_1)*s + R_1 + R_2 + R_3)
# ->
V_i*R_3/(R_1 + R_2 + R_3)*(R_1 + R_2 + R_3)/(L_1 + L_2)/(s + (R_1 + R_2 + R_3)/(L_1 + L_2))
K_Z2_1 == R_3/(R_1 + R_2 + R_3)
α_Z2_1 == (R_1 + R_2 + R_3)/(L_1 + L_2)
τ_Z2_1 == 1/α_Z2_1
# Mocking reading data:
# Let's pretend the parameters had these values:
R_1 := 2
R_2 := 4
R_3 := 5
L_1 := 1*10^-3
L_2 := 3*10^-3
Z_1 := R_1 + L_1*s  # error: These units are not compatible.
Z_2 := R_2 + L_2*s  # error: These units are not compatible.
Z_3 := R_3
# Based on sensor data, we should then be able to read that V_Z2_2 had the following transfer function:
V_Z2_2 := V_i*Z_3/(Z_2 + Z_3) simplify → 5000*V_i/(3*s + 9000)
K_Z2_2 := R_3/(R_2 + R_3) → 5/9
α_Z2_2 := (R_2 + R_3)/L_2 → 3000
τ_Z2_2 := L_2/(R_2 + R_3) → 1/3000
V_Z2_2 := V_i*K_Z2_2*α_Z2_2/(s + α_Z2_2) → 5000*V_i/(3*s + 9000)  # <- Checking with math above
# Repeat:
V_Z2_1 := V_i*Z_3/(Z_1 + Z_2 + Z_3) simplify → 1250*V_i/(s + 2750)
K_Z2_1 := R_3/(R_1 + R_2 + R_3) → 5/11
α_Z2_1 := (R_1 + R_2 + R_3)/(L_1 + L_2) → 2750
τ_Z2_1 := 1/α_Z2_1 → 1/2750
V_Z2_1 := V_i*K_Z2_1*α_Z2_1/(s + α_Z2_1) → 1250*V_i/(s + 2750)  # <- Checking with math above
# Solving equation:
clear(Z_1, Z_2, L_1, L_2)  # <- We no longer known the actual inductances. Only the transfer functions and their shapes and resistances.
# We can start by finding L_2:
Z_2 := V_Z2_2 == V_i*Z_3/(Z_2 + Z_3) solve, Z_2 → (3*s + 4000)/1000
L_2 := Z_2 - R_2 → 3*s/1000
# We can then find L_1:
Z_1 := V_Z2_1 == V_i*Z_3/(Z_1 + Z_2 + Z_3) solve, Z_1 → (s + 2000)/1000
L_1 := Z_1 - R_1 → s/1000
# Solving equation 2:
# We can also do like when we deduced the resistances:
clear(Z_1, Z_2, L_1, L_2)
A := [V_i, 0; 0, V_i]
x := [Z_3/(Z_1 + Z_2 + Z_3); Z_3/(Z_2 + Z_3)]
B := [V_Z2_1; V_Z2_2]  # <- Input voltage * Voltage divider factor = Voltage over Z2
[Z_1, Z_2] := A*x == B solve, Z_1, Z_2; assume, ALL ≥ 0 → [(s + 2000)/1000, (3*s + 4000)/1000]
L_1 := Z_1 - R_1 → s/1000
L_2 := Z_2 - R_2 → 3*s/1000
# Solving equation 3:
clear(Z_1, Z_2, L_1, L_2)
# Or simply because we know the time constants and their relation to the components:
τ_Z2_2 == 1/α_Z2_2
# <- We read this
α_Z2_2 == (R_3 + R_2)/L_2
τ_Z2_2 == L_2/(R_2 + R_3)
L_2 := τ_Z2_2*(R_2 + R_3) = 0.003
# Repeat:
τ_Z2_1 == 1/α_Z2_1
α_Z2_1 == (R_1 + R_2 + R_3)/(L_1 + L_2)
τ_Z2_1 == (L_1 + L_2)/(R_1 + R_2 + R_3)
L_1 := τ_Z2_1*(R_1 + R_2 + R_3) - L_2 = 0.001
# Plotting the curves for Multisim verification:
v_Z2_1(t) := V_Z2_1/V_i*1/s invlaplace → (-(5*e^(-(2750*t))) + 5)/11
v_Z2_2(t) := V_Z2_2/V_i*1/s invlaplace → (-(5*e^(-(3000*t))) + 5)/9
# [plot: v_Z2_1(t) vs t]
# [plot: v_Z2_2(t) vs t]
# (This is same as Multisim)
