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# Showing that previous the methodology technically still works:
# Look at the setup above. Assume that the values L1, L2, and L3 are unknown.
# We have previously estimated the values of R1, R2, and R3. For now we consider the appliances binary, i.e., a constant resistance that was already determined, and a switch that determined if it is on/off.
# We have the voltage probes PR1 and PR2 available and we have control over the switches S1 and S2. How can we determine the parameters of the inductors?
R_1 := 1
R_2 := 2
R_3 := 3
R_1app := 4
R_2app := 5
L_1 := 2*s
L_2 := 3*s
L_3 := 4*s
Z_1 := R_1 + L_1 + R_1app
Z_2 := R_2 + L_2 + R_2app
Z_3 := R_3 + L_3
Z_4 := (Z_1^-1 + Z_2^-1)^-1
# Test 1: S1 closed, S2 open. We look at VPR1:
V_1 := V_i*R_1app/(Z_1 + Z_3) → 2*V_i/(3*s + 4)
# Test 2: S1 open, S2 closed. We look at VPR2:
V_2 := V_i*R_2app/(Z_2 + Z_3) → 5*V_i/(7*s + 10)
# Test 3: S1 open, S2 open. We look at VPR1:
# This is the term describing the voltage at the node, times the voltage divider at the application:
D_tmp1 := Z_4/(Z_3 + Z_4) simplify → (101*s + 242)/(338*s^2 + 1196*s + 923) + 3/13  # <- Voltage at node
D_tmp2 := R_1app/Z_1 simplify → 4/(2*s + 5)  # <- Voltage divider at appliance 1
V_3 := V_i*D_tmp1*D_tmp2 simplify → 4*V_i*(3*s + 7)/(26*s^2 + 92*s + 71)
clear(Z_1, Z_2, Z_3, L_1, L_2, L_3)
A := [V_i, 0, 0; 0, V_i, 0; 0, 0, V_i]
x := [R_1app/(Z_1 + Z_3); R_2app/(Z_2 + Z_3); Z_4/(Z_3 + Z_4)*R_1app/Z_1]
B := [V_1; V_2; V_3]  # <- Input voltage * Voltage divider factor = Voltage at probes
Mat := A*x == B solve, Z_1, Z_2, Z_3; assume, ALL ≥ 0 → [
    [(26*s^2 + 92*s + 71)/(5*s + 12), (31*s^2 + 114*s + 95)/(5*s + 12), (4*s^2 + 20*s + 25)/(5*s + 12)];
    [2*s + 5, 3*s + 7, 4*s + 3]
]
# We get multiple solutions, but we know the second one is right, since our impedances are not 2nd order systems.
# (If we didn't use Z1, Z2, L3, etc. then we could simply solve for L1, L2, L3)
[Z_1, Z_2, Z_3] := Mat[1, 0] → [2*s + 5, 3*s + 7, 4*s + 3]
L_1 := Z_1 - R_1 - R_1app → 2*s
L_2 := Z_2 - R_2 - R_2app → 3*s
L_3 := Z_3 - R_3 → 4*s
# Showing the shapes of the transfer functions we need to observe:
clear(R_1, R_2, R_3, R_1app, R_2app, Z_1, Z_2, Z_3, L_1, L_2, L_3, V_1, V_2, V_3)
Z_1 := R_1 + L_1*s + R_1app
Z_2 := R_2 + L_2*s + R_2app
Z_3 := R_3 + L_3*s
Z_4 := (Z_1^-1 + Z_2^-1)^-1
V_1 := V_i*R_1app/(Z_1 + Z_3) → R_1app*V_i/((L_3 + L_1)*s + R_3 + R_1 + R_1app)  # <- First order low pass filter = easy
V_2 := V_i*R_2app/(Z_2 + Z_3) → R_2app*V_i/((L_3 + L_2)*s + R_3 + R_2 + R_2app)  # <- First order low pass filter = easy
# Second order with weird shape:
V_3 := V_i*Z_4/(Z_3 + Z_4)*R_1app/Z_1 simplify → R_1app*V_i*(L_2*s + R_2 + R_2app)/(((L_2 + L_1)*L_3 + L_1*L_2)*s^2 + ((L_2 + L_1)*R_3 + (L_3 + L_1)*R_2 + (L_3 + L_1)*R_2app + (L_3 + L_2)*R_1 + (L_3 + L_2)*R_1app)*s + (R_2 + R_2app + R_1 + R_1app)*R_3 + (R_1 + R_1app)*R_2 + (R_1 + R_1app)*R_2app)
# If we define actual values for the resistors, then we can get a better idea of the transfer function component:
R_1 := 1
R_2 := 2
R_3 := 3
R_1app := 4
R_2app := 5
Z_1 := R_1 + L_1*s + R_1app
Z_2 := R_2 + L_2*s + R_2app
Z_3 := R_3 + L_3*s
Z_4 := (Z_1^-1 + Z_2^-1)^-1
V_3 := V_i*Z_4/(Z_3 + Z_4)*R_1app/Z_1 simplify → 4*V_i*(L_2*s + 7)/(((L_2 + L_1)*L_3 + L_1*L_2)*s^2 + (12*L_3 + 8*L_2 + 10*L_1)*s + 71)
# Is something like:
(A*s + B)/(C*s^2 + D*s + E)
# This can also be described as (see "predicting_dynamics"):
K*(1 + M*s)*(ω_n^2/(s^2 + 2*ζ*ω_n*s + ω_n^2))
# I.e. a gain, a low-pass component and a high-pass component.
# The tricky part is to determine each component
# Continued in "predicting_dynamics"
