# Showcasing why we can only predict dynamics:
# Function we can predict:
G(s) := 1/(s^2 + 0.7*s + 1)  # <- Actual function
g(t) := G(s)*1/s invlaplace → -0.373632358879*e^(-0.35*t)*sin(0.93674969976*t) + (1.0 - 1.0*cos(0.93674969976*t)*e^(-0.35*t))  # <- step response
K := 1
# <- Gain factor
ω_n := sqrt(K)
OS := 1.30/1 - 1 → 0.3
ζ := sqrt(ln(OS)^2/(π^2 + ln(OS)^2)) = 0.357857
# <- https://www.fxsolver.com/browse/formulas/Damping+ratio++%28related+to+the+percentage+overshoot%29
# (They don't use decimal percentages)
F(s) := ω_n^2/(s^2 + 2*ζ*ω_n*s + ω_n^2) → 1.0/(s^2 + 0.715714261007*s + 1.0)  # <- Estimated system
f(t) := F(s)*1/s invlaplace → -0.383236446313*e^(-0.357857130503*t)*sin(0.933776351247*t) + (1.0 - 1.0*cos(0.933776351247*t)*e^(-0.357857130503*t))
# [plot: f(t), g(t) vs t]
# Function we cannot predict:
G(s) := 2*1/(s^2 + 0.7*s + 1)  # <- Actual function - Gain + dynamics
g(t) := G(s)*1/s invlaplace → -0.747264717757*e^(-0.35*t)*sin(0.93674969976*t) + (2.0 - 2.0*cos(0.93674969976*t)*e^(-0.35*t))  # <- step response
K := 2
# <- Gain factor
ω_n := sqrt(K)
OS := 2.6/2 - 1 → 0.3
ζ := sqrt(ln(OS)^2/(π^2 + ln(OS)^2)) = 0.357857
F(s) := ω_n^2/(s^2 + 2*ζ*ω_n*s + ω_n^2) → 2.0/(s^2 + 1.0121728147*s + 2.0)  # <- Estimated system
f(t) := F(s)*1/s invlaplace → -0.383236446313*e^(-0.50608640735*t)*sin(1.32055918016*t) + (1.0 - 1.0*cos(1.32055918016*t)*e^(-0.50608640735*t))
# [plot: f(t), g(t) vs t]
# However, since we know the function has the shape G(s) = K* dynamics = 2*dynamics, we can look G(s)/2
G(s) := G(s)/2  # <- Actual function - Gain + dynamics
g(t) := G(s)*1/s invlaplace → -0.373632358879*e^(-0.35*t)*sin(0.93674969976*t) + (1.0 - 1.0*cos(0.93674969976*t)*e^(-0.35*t))  # <- step response
K := 1
# <- Gain factor
ω_n := sqrt(K)
OS := 1.3/1 - 1 → 0.3
ζ := sqrt(ln(OS)^2/(π^2 + ln(OS)^2)) = 0.357857
F(s) := ω_n^2/(s^2 + 2*ζ*ω_n*s + ω_n^2) → 1.0/(s^2 + 0.715714261007*s + 1.0)  # <- Estimated system
f(t) := F(s)*1/s invlaplace → -0.383236446313*e^(-0.357857130503*t)*sin(0.933776351247*t) + (1.0 - 1.0*cos(0.933776351247*t)*e^(-0.357857130503*t))
# [plot: f(t), g(t) vs t]
# Another try - more difficult that might resemble our system:
G(s) := (4*s + 2)/(s^2 + 2*s + 1)  # <- Can be decomposed to:
G(s) := 2*(1 + 2*s)*1/(s^2 + 2*s + 1)
K := 2
X(s) := 2*s  # <- differentiator
G(s) := K*(1 + X(s))*(1/(s^2 + 2*s + 1))
# <- Conclusion:
# We would need a way to determine the values of K and X(s). That is not possible without being able to vary the frequencies of the input signal. We need to think differently.
g(t) := G(s)*1/s invlaplace → (2*t - 2)*e^(-t) + 2
# [plot: g(t) vs t]
