V1 := 1
V2 := 1
V3 := 1
R_1 := 3
R_2 := 5
R_3 := 7
R_app2 := 11
R_app3 := 13
L_1 := 17*s
L_2 := 19*s
L_3 := 23*s
Z_1 := R_1 + L_1
Z_2 := R_2 + L_2 + R_app2
Z_3 := R_3 + L_3 + R_app3
Z_4 := (Z_2^-1 + Z_3^-1)^-1 simplify → (3059*s + 2614)/294 - 2/(1029*s + 882)
A1 := V1/(Z_1 + Z_2) → 1/(36*s + 19)
A2 := V2/(Z_1 + Z_3) → 1/(40*s + 23)
A3 := V3/(Z_1 + Z_4) simplify → (42*s + 36)/(1151*s^2 + 1486*s + 428)
clear(L_1, L_2, L_3)
Z_1 := R_1 + L_1
Z_2 := R_2 + L_2 + R_app2
Z_3 := R_3 + L_3 + R_app3
Z_4 := (Z_2^-1 + Z_3^-1)^-1 simplify → (L_2 + 16)*(L_3 + 20)/(L_3 + L_2 + 36)
A := [A1, 0, 0; 0, A2, 0; 0, 0, A3]
x := [Z_1 + Z_2; Z_1 + Z_3; Z_1 + Z_4]
B := [V1; V2; V3]
A*x == B solve, L_1, L_2, L_3; assume, ALL ≥ 0 → [17*s, 19*s, 23*s]
A := [A1, 0; 0, A2]
x := [Z_1 + Z_2; Z_1 + Z_3]
B := [V1; V2]
A*x == B solve, L_2, L_3; assume, ALL ≥ 0 → {
    if 40*s - L_1 ≥ 0 and 36*s - L_1 ≥ 0
        [36*s - L_1, 40*s - L_1]
    else
        undefined
}
L_2 := 36*s - L_1 → 36*s - L_1
L_3 := 40*s - L_1 → 40*s - L_1
G(L_1) := (R_app3 + R_app2 + R_3 + R_2 + L_3 + L_2)/((R_app2 + R_2 + R_1 + L_2 + L_1)*R_app3 + (R_3 + R_1 + L_3 + L_1)*R_app2 + (R_2 + R_1 + L_2 + L_1)*R_3 + (R_1 + L_3 + L_1)*R_2 + (L_3 + L_2)*R_1 + (L_2 + L_1)*L_3 + L_1*L_2) simplify → (76*s + (36 - 2*L_1))/(1440*s^2 + 1588*s + (428 - (L_1^2 + 6*L_1)))
a3(t) := A3*1/s invlaplace → (731*sqrt(59421)*1i*e^(-(743*t)/1151)*sin(sqrt(59421)*1i*t/1151) + (178263 - 178263*cos(sqrt(59421)*1i*t/1151)*e^(-(743*t)/1151)))/2119349
g(x, t) := G(x*s)*1/s invlaplace → ((187*x - 986)*e^((-(3*t*x) + 794*t)/(x^2 - 1440))*sin(t*sqrt((-(437*x^2) + 4764*x - 14116)/(x^4 - 2880*x^2 + 2073600))) + (12960 - 9*x^2)*sqrt((-(437*x^2) + 4764*x - 14116)/(x^4 - 2880*x^2 + 2073600))*e^((-(3*t*x) + 794*t)/(x^2 - 1440))*cos(t*sqrt((-(437*x^2) + 4764*x - 14116)/(x^4 - 2880*x^2 + 2073600))) + (9*x^2 - 12960)*sqrt((-(437*x^2) + 4764*x - 14116)/(x^4 - 2880*x^2 + 2073600)))/((107*x^2 - 154080)*sqrt((-(437*x^2) + 4764*x - 14116)/(x^4 - 2880*x^2 + 2073600)))
# [plot: a3(t), g(17, t), g(11, t), g(23, t) vs t]
G(L_1, s) := (R_app3 + R_app2 + R_3 + R_2 + L_3 + L_2)/((R_app2 + R_2 + R_1 + L_2 + L_1)*R_app3 + (R_3 + R_1 + L_3 + L_1)*R_app2 + (R_2 + R_1 + L_2 + L_1)*R_3 + (R_1 + L_3 + L_1)*R_2 + (L_3 + L_2)*R_1 + (L_2 + L_1)*L_3 + L_1*L_2) simplify → (76*s + (36 - 2*L_1))/(1440*s^2 + 1588*s + (428 - (L_1^2 + 6*L_1)))
H(x, ω) := 20*log(|G(x*1j*ω, 1j*ω)|)
# [plot: H(11, ω), H(13, ω), H(24, ω) vs ω]
