# Parameter estimation with limited sensor data:
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# Look at the setup above. Assume that the values R1, R2, and R3 are unknown. We have the voltage/current probe PR1 available and we have control over the switches S1 and S2. How can we determine the parameters of the resistors?
# Newtons method:
V := 1 V
R1 := 1 Ω
R2 := 2 Ω
R3 := 3 Ω  # <- Actual values that we are trying to determine)
R4 := (R2^-1 + R3^-1)^-1 = 1.2 Ω  # <- R2 || R3
# Basically Newtons method
# Using three measurements:
# First measurement:
# With S1 open and S2 closed:
I := V/(R1 + R2) = 0.333333 A  # <- What our probe measures
TOT1 := V/I = 3 Ω  # <- Total resistance of measurement 1
# Second measurement:
# With S1 closed and S2 open:
I := V/(R1 + R3) = 0.25 A
TOT2 := V/I = 4 Ω
# Third measurement:
# With S1 open and S2 open:
I := V/(R1 + R4) = 0.454545 A
TOT3 := V/I = 2.2 Ω
# Guess a value for R1:
R1_guess := 0 Ω = 0 Ω  # <- The current guess (Change for each iteration)
R2_guess := TOT1 - R1_guess = 3 Ω  # <- Since EQ1 = R1+R2 in our setup
R3_guess := TOT2 - R1_guess = 4 Ω  # <- Since EQ2 = R1+R3 in our setup
# Find error:
R4_guess := (R2_guess^-1 + R3_guess^-1)^-1 = 1.71429 Ω
TOT3_guess := R1_guess + R4_guess = 1.71429 Ω
Err := TOT3 - TOT3_guess = 0.485714 Ω
R1_new_guess := R1_guess + Err = 0.485714 Ω
# Equation solving:
V1 := 1
V2 := 1
V3 := 1
R_1 := 1
R_2 := 2
R_3 := 3
R_4 := (R_2^-1 + R_3^-1)^-1
A1 := V1/(R_1 + R_2)
A2 := V2/(R_1 + R_3)
A3 := V3/(R_1 + R_4)
clear(R_1, R_2, R_3, R1, R2, R3)
R4 := (R2^-1 + R3^-1)^-1 → 1/(1/R2 + 1/R3)
A := [1/A1, 0, 0; 0, 1/A2, 0; 0, 0, 1/A3]
x := [V1; V2; V3]
B := [R1 + R2; R1 + R3; R1 + R4]
A*x == B solve, R1, R2, R3; assume, ALL ≥ 0 → [1, 2, 3]
A := [A1, 0, 0; 0, A2, 0; 0, 0, A3]
x := [R1 + R2; R1 + R3; R1 + R4]
B := [V1; V2; V3]
A*x == B solve, R1, R2, R3; assume, ALL ≥ 0 → [1, 2, 3]
# What if we had only two equations?
# Possible combinations:
# S1, S2
# S1, S1 and S2
# S2, S1 and S2
# S1, S2:
# Two equations with three unknowns.
A := [A1, 0; 0, A2]
x := [R1 + R2; R1 + R3]
B := [V1; V2]
A*x == B solve, R1, R2; assume, ALL ≥ 0 → {
    if 1 ≤ R3 ≤ 4
        [-R3 + 4, R3 - 1]
    else
        undefined
}
# <- If we assume that the variables must be >= 0, then we know that R3 must be a number between 1 and 4.
x := 1, 1.001 .. 4
R1(R3) := -R3 + 4
R2(R3) := R3 - 1
# [plot: R1(x), R2(x) vs x]
# Conclusion:
# We get something that expresses the relationship between R1 and R2. Could also be made for R1 and R3, or R2 and R3 by solving for something else.
# It is an underdetermined system so we have infinite solutions.
clear(R1, R2, R3, R4)
# S1, S1 and S2:
R4 := (R2^-1 + R3^-1)^-1
A := [A1, 0; 0, A3]
x := [R1 + R2; R1 + R4]
B := [V1; V3]
A*x == B solve, R1, R2; assume, ALL ≥ 0, R3 > 0 → {
    if -sqrt(80*R3 + 16) + 26 ≥ 0
        [(-sqrt(80*R3 + 16) + 26)/10, (sqrt(80*R3 + 16) + 4)/10]
    else
        undefined
}
R1(R3) := (-sqrt(80*R3 + 16) + 26)/10
R2(R3) := (sqrt(80*R3 + 16) + 4)/10
# [plot: R1(x), R2(x) vs x]
# Conclusion:
# We get something similar but Mathcad is much worse at solving it (see e.g, at x=3 on graph). We think that if one was a math god then  perhaps it would be able to solve it.
clear(R1, R2, R3, R4)
# S2, S1 and S2:
R4 := (R2^-1 + R3^-1)^-1
A := [A2, 0; 0, A3]
x := [R1 + R3; R1 + R4]
B := [V2; V3]
A*x == B solve, R1, R2; assume, ALL ≥ 0, R3 > 0 → {
    if 5*R3^2 - 9*R3 ≥ 0 and R3 ≤ 4
        [-R3 + 4, (5*R3^2 - 9*R3)/9]
    else
        undefined
}
R1(R3) := -R3 + 4
R2(R3) := (5*R3^2 - 9*R3)/9
# [plot: R1(x), R2(x) vs x]
# Conclusion:
# Same conclusion as before
